# Initialization

units		lj
dimension 	2
atom_style	atomic
pair_style	lj/cut 2.5
boundary	p p p

# System definition

region		myreg1 block -50 50 -20 20 -0.5 0.5
region		myreg2 block -18 18 -6 6 -0.5 0.5
create_box	2 myreg1
create_atoms	1 random 9 341341 myreg2
create_atoms	2 random 3 127569 myreg2

# Simulation settings

mass		1 1
mass		2 1
pair_coeff	1 1 1.0 1.0
pair_coeff	2 2 0.5 3.0
neigh_modify	every 1 delay 5 check yes
dump 		mydmp all atom 1000 dump.lammpstrj

# Run

thermo		10
minimize	1.0e-4 1.0e-6 1000 10000
fix		mynve all nve
fix		mylgv all langevin 1.0 1.0 0.1 1530917
fix		myefn all enforce2d
timestep	0.005
thermo		100
run		4000
undump		mydmp

write_data	data.equilibrium

dump 		mydmp all atom 20 dump.lammpstrj

run		10000
