# PART A - ENERGY MINIMIZATION

# 1) Initialization
units lj
dimension 3
atom_style atomic
pair_style lj/cut 2.5
boundary p p p

# 2) System definition
region simulation_box block -40 40 -40 40 -40 40
create_box 2 simulation_box
region start block -3 3 -3 3 -3 3
create_atoms 1 random 12 341341 start
create_atoms 2 random 3 127569 start

# 3) Simulation settings
neigh_modify every 1 delay 5 check yes
mass 1 1
mass 2 1
pair_coeff 1 1 1.0 1.0
pair_coeff 2 2 0.5 3.0

# 4) Visualization
thermo 10

# 5) Run
minimize 1.0e-4 1.0e-6 1000 10000

# PART B - MOLECULAR DYNAMICS

# 4) Visualization
dump mydmp all atom 100 dump.lammpstrj
thermo 1000

# 5) Run
fix mynve all nve
fix mylgv all langevin 1.0 1.0 0.1 1530917
timestep 0.005
run 4000
