# Initialisation

variable T equal 300

units real
atom_style molecular
boundary f f f
pair_style lj/cut 14

bond_style harmonic
angle_style harmonic
dihedral_style opls
improper_style harmonic

special_bonds lj 0.0 0.0 0.5

read_data cnt_molecular.data
include parm.lammps

group carbon_atoms type 1
variable carbon_xcm equal -1*xcm(carbon_atoms,x)
variable carbon_ycm equal -1*xcm(carbon_atoms,y)
variable carbon_zcm equal -1*xcm(carbon_atoms,z)
displace_atoms carbon_atoms move ${carbon_xcm} ${carbon_ycm} ${carbon_zcm}

change_box all x final -40 40 y final -40 40 z final -40 40

variable zmax equal bound(carbon_atoms,zmax)-0.5
variable zmin equal bound(carbon_atoms,zmin)+0.5
region rtop block INF INF INF INF ${zmax} INF
region rbot block INF INF INF INF INF ${zmin}
region rmid block INF INF INF INF ${zmin} ${zmax}
group carbon_top region rtop
group carbon_bot region rbot
group carbon_mid region rmid

set group carbon_top type 2
set group carbon_bot type 3

velocity carbon_mid create ${T} 48455 mom yes rot yes
fix mynve all nve
compute Tmid carbon_mid temp
fix myber carbon_mid temp/berendsen ${T} ${T} 100
fix_modify myber temp Tmid

fix mysf1 carbon_top setforce 0 NULL 0
fix mysf2 carbon_bot setforce 0 NULL 0
velocity carbon_top set 0 NULL 0
velocity carbon_bot set 0 NULL 0

variable L equal xcm(carbon_top,z)-xcm(carbon_bot,z)
fix at1 all ave/time 10 100 1000 v_L file cnt_length.dat
fix at2 all ave/time 10 100 1000 f_mysf1[1] f_mysf2[1] file edge_force.dat
dump mydmp all atom 1000 dump.lammpstrj

fix at3 all ave/time 10 100 1000 c_Tmid file temperature_middle_group.dat

thermo 100
thermo_modify temp Tmid

timestep 1.0
run 5000

# uncomment for option A
#variable var loop 10
#	label loop
#	displace_atoms carbon_top move 0 0 0.1
#	displace_atoms carbon_bot move 0 0 -0.1
#	run 5000
#	next var
#	jump input.lammps loop

# uncomment for option B
velocity carbon_top set NULL NULL 0.0005
velocity carbon_bot set NULL NULL -0.0005
run 10000
