# pure bulk water system
# Written by Simon Gravelle
# My personal page : https://simongravelle.github.io/
# My Github account: https://github.com/simongravelle/
# LAMMPS tutorials for beginners: https://lammpstutorials.github.io/

variable f0 equal 5 # kcal/mol/A # 1 kcal/mol/A = 67.2 pN

units real
atom_style full
bond_style harmonic
angle_style harmonic
dihedral_style harmonic
pair_style lj/cut/coul/long 12
kspace_style pppm 1e-5
special_bonds lj 0.0 0.0 0.5 coul 0.0 0.0 1.0 angle yes dihedral yes

read_data ../mergePEGH2O/mix.data
include ../PARM.lammps

group H2O type 1 2
group PEG type 3 4 5 6 7

group topull type 6
write_dump topull atom topull.lammpstrj
group topull1 id 3216
group topull2 id 3151

dump mydmp all atom 1000 dump.lammpstrj

timestep 1
fix mynvt all nvt temp 300 300 100

# for eastetical purpose only (i.e. keep the PEG in the center)
#displace_atoms all move 0 0 -10 units box
#fix myrct PEG recenter INIT INIT INIT

variable mytemp equal temp
fix myat1 all ave/time 10 10 100 v_mytemp file output-temperature.dat
variable x1 equal xcm(topull1,x)
variable x2 equal xcm(topull2,x)
variable y1 equal xcm(topull1,y)
variable y2 equal xcm(topull2,y)
variable z1 equal xcm(topull1,z)
variable z2 equal xcm(topull2,z)
variable delta_r equal sqrt((v_x1-v_x2)^2+(v_y1-v_y2)^2+(v_z1-v_z2)^2)
fix myat2 all ave/time 10 10 100 v_delta_r file output-end-to-end-distance.dat
thermo 1000

run 30000

fix myaf1 topull1 addforce ${f0} 0 0
fix myaf2 topull2 addforce -${f0} 0 0

run 30000
