# LAMMPS input script
# author : Simon Gravelle
# lammpstutorials.github.io

units metal
boundary p p p
atom_style full
neighbor 1.0 bin
neigh_modify delay 1
pair_style hybrid/overlay vashishta lj/cut/tip4p/long 3 4 1 1 0.1546 10
kspace_style pppm/tip4p 1.0e-4
bond_style harmonic
angle_style harmonic

read_data SiOwithwater.data
molecule h2omol TIP4P2005.txt
#lattice sc 3
#create_atoms 0 box mol h2omol 45585
#lattice none 1

group SiO type 1 2
group H2O type 3 4

pair_coeff * * vashishta SiO.1990.vashishta Si O NULL NULL
pair_coeff * * lj/cut/tip4p/long 0 0
pair_coeff 1 3 lj/cut/tip4p/long 0.0057 4.42 # epsilonSi = 0.00403, sigmaSi = 3.69
pair_coeff 2 3 lj/cut/tip4p/long 0.0043 3.12 # epsilonO = 0.0023, sigmaO = 3.091
pair_coeff 3 3 lj/cut/tip4p/long 0.008 3.1589
pair_coeff 4 4 lj/cut/tip4p/long 0.0 0.0
bond_coeff 1 0 0.9572
angle_coeff 1 0 104.52

fix shak H2O shake 1.0e-4 200 0 b 1 a 1 mol h2omol

compute_modify thermo_temp dynamic yes
compute ctH2O H2O temp
compute_modify ctH2O dynamic yes
fix mynvt1 H2O nvt temp 300 300 0.1
fix_modify mynvt1 temp ctH2O
compute ctSiO SiO temp
fix mynvt2 SiO nvt temp 300 300 0.1
fix_modify mynvt2 temp ctSiO
timestep 0.001
thermo 1000

region forvideo block -3 23 5 19 5 16
group in region forvideo
group water_in intersect H2O in
group water_in include molecule
group SiO_in intersect SiO in
group forvideo union water_in SiO_in

dump dmp forvideo atom 5 dump.lammpstrj

run 2000
