# ------------- LAMMPS input script
# ------------- author : Simon Gravelle
# ------------- https://lammpstutorials.github.io
# ------------- https://lammpstutorials.github.io/tutorials/03-NanoconfinedElectrolyte.html

# ------------- Initialisation
units			real
atom_style		full
bond_style		harmonic
angle_style		harmonic
pair_style		lj/cut/tip4p/long 1 2 1 1 0.1546 12.0
kspace_style	pppm/tip4p 1.0e-4

# ------------- System definition
lattice			fcc 4.04
region			box block -5 5 -5 5 -13 13
create_box		6 box &
				bond/types 1 &
				angle/types 1 &
				extra/bond/per/atom 2 &
				extra/angle/per/atom 1 &
				extra/special/per/atom 2

# ------------- create the walls
region			rbotwall block -5 5 -5 5 -12 -10
region			rtopwall block -5 5 -5 5 10 12

create_atoms 	5 region rtopwall
create_atoms 	6 region rbotwall

# ------------- create the fluid
region			rliquid block -5 5 -5 5 -9 9
lattice			sc 4.04
molecule 		h2omol TIP4P2005.txt
create_atoms 	0 region rliquid mol h2omol 482793

fix				mydep1 all deposit 10 3 1 56513 region rliquid near 0.3
fix				mydep2 all deposit 10 4 1 58613 region rliquid near 0.3

# ------------- settings
include			PARM.lammps

#dump 			mydmp all image 10 dump.*.jpg type type

# ------------- run
run				10

set 			type 3 charge 1.0
set 			type 4 charge -1.0

write_data		data.01.lammps
