# --------------------- LAMMPS input script
# --------------------- author : Simon Gravelle
# --------------------- lammpstutorials.github.io

# --------------------- define a bunch of variables
variable				sigma equal 3.405 # Angstrom
variable				epsilon equal 0.238 # Kcal/mol
variable				U0 equal 10*${epsilon} # Kcal/mol
variable				dlt equal 0.5 # Angstrom
variable				x0 equal 5.0  # Angstrom

# --------------------- initialise the simulation
units					real
atom_style				atomic
pair_style				lj/cut 3.822 # 2^(1/6) * 3.405 WCA potential
pair_modify 			shift yes
boundary				p p p

# --------------------- define the system
region					myreg block -25 25 -20 20 -20 20
create_box				1 myreg
create_atoms			1 random 60 341341 myreg

# --------------------- settings
mass					* 39.95
pair_coeff				* * ${epsilon} ${sigma}
neigh_modify			every 1 delay 4 check yes

# --------------------- run
minimize				1e-4 1e-6 100 1000
reset_timestep			0

variable				U atom ${U0}*atan((x+${x0})/${dlt})-${U0}*atan((x-${x0})/${dlt})
variable				F atom ${U0}/((x-${x0})^2/${dlt}^2+1)/${dlt}-${U0}/((x+${x0})^2/${dlt}^2+1)/${dlt}
fix 					myadf all addforce v_F 0.0 0.0 energy v_U

fix						mynve all nve
fix						mylgv all langevin 119.8 119.8 100 1530917

region					mymes block -5 5 INF INF INF INF
variable				n_center equal count(all,mymes)
fix						myat all ave/time 100 500 50000 v_n_center file density_evolution_largeU0.dat

timestep				2.0
thermo					100000
run						2000000
unfix					myat # important
reset_timestep			0

compute 				cc1 all chunk/atom bin/1d x 0.0 1.0
fix 					myac all ave/chunk 10 100000 1000000 cc1 density/number file density_profile_10run_largeU0.dat
dump 					mydmp all atom 1000000 dump.lammpstrj

run						10000000

# uncomment to perform long run
#unfix					myac
#reset_timestep			0
#fix 					myac all ave/chunk 10 100000 1000000 cc1 density/number file density_profile_100run.dat
#run						100000000
