# LAMMPS input script
# author : Simon Gravelle
# lammpstutorials.github.io

# -------------	Initialization
units		lj
dimension 	2
atom_style	atomic
pair_style	lj/cut 2.5
boundary	p p p

# ------------- System definition
read_data	../data.lammps

# ------------- Simulation settings
mass		* 1
pair_coeff	* * 1.0 1.0
neigh_modify	every 1 delay 5 check yes
dump 		mydmp all atom 1000 dump.lammpstrj

# ------------- Run
minimize	1.0e-4 1.0e-6 1000 10000
reset_timestep	0
velocity 	all create 1.0 4928459 mom yes rot yes dist gaussian
fix		mynve all nve
fix		mylgv all langevin 1.0 1.0 0.1 1530917 zero yes
fix		myefn all enforce2d
timestep	0.005
thermo		1000
run		2000000
